// SBML level 2 version 4

model New_Model()

  // Compartments:
  compartment compartment = 1;

  // Species:
  species G6P in compartment = 1;
  species Gluc in compartment = 1;
  species PEP in compartment = 1;
  species PYR in compartment = 1;
  species F6P in compartment = 1;
  species ADP in compartment = 1;
  species ATP in compartment = 1;
  species FBP in compartment = 1;
  species DHAP in compartment = 1;
  species G3P in compartment = 1;
  species BPG in compartment = 1;
  species NAD in compartment = 1;
  species NADH in compartment = 1;
  species Pi in compartment = 1;
  species P3G in compartment = 1;
  species P2G in compartment = 1;
  species H2O in compartment = 1;
  species AcCoA in compartment = 1;
  species Acd in compartment = 1;
  species CoA in compartment = 1;
  species ETOH in compartment = 1;
  species FOR in compartment = 1;
  species AcAcCoA in compartment = 1;
  species HBCoA in compartment = 1;
  species PHB in compartment = 1;
  species ACDH in compartment = 1;

  // Reactions:
  GluKin: Gluc + ATP -> G6P + ADP; compartment*(GluKin_k1*Gluc*ATP - GluKin_k2*G6P*ADP);
    GluKin_k1 = 0.1; GluKin_k2 = 0.1;
  PGI: G6P -> F6P; compartment*(PGI_k1*G6P - PGI_k2*F6P);
    PGI_k1 = 0.1; PGI_k2 = 0.1;
  PFK: ATP + F6P -> ADP + FBP; compartment*(PFK_k1*ATP*F6P - PFK_k2*ADP*FBP);
    PFK_k1 = 0.1; PFK_k2 = 0.1;
  ALD: FBP -> DHAP + G3P; compartment*(ALD_k1*FBP - ALD_k2*DHAP*G3P);
    ALD_k1 = 0.1; ALD_k2 = 0.1;
  TPI: DHAP -> G3P; compartment*(TPI_k1*DHAP - TPI_k2*G3P);
    TPI_k1 = 0.1; TPI_k2 = 0.1;
  GAPDH: Pi + G3P + NAD -> BPG + NADH; compartment*(GAPDH_k1*Pi*G3P*NAD - GAPDH_k2*BPG*NADH);
    GAPDH_k1 = 0.1; GAPDH_k2 = 0.1;
  PGK: ADP + BPG -> ATP + P3G; compartment*(PGK_k1*ADP*BPG - PGK_k2*ATP*P3G);
    PGK_k1 = 0.1; PGK_k2 = 0.1;
  PGM: P3G -> P2G; compartment*(PGM_k1*P3G - PGM_k2*P2G);
    PGM_k1 = 0.1; PGM_k2 = 0.1;
  ENO: P2G -> PEP + H2O; compartment*(ENO_k1*P2G - ENO_k2*PEP*H2O);
    ENO_k1 = 0.1; ENO_k2 = 0.1;
  PYK: PEP + ADP -> PYR + ATP; compartment*(PYK_k1*PEP*ADP - PYK_k2*PYR*ATP);
    PYK_k1 = 0.1; PYK_k2 = 0.1;
  AcdDH: NADH + AcCoA -> NAD + ACDH + CoA; compartment*(AcdDH_k1*NADH*AcCoA - AcdDH_k2*NAD*ACDH*CoA);
    AcdDH_k1 = 0.1; AcdDH_k2 = 0.1;
  PFL: PYR + CoA -> AcCoA + FOR; compartment*(PFL_k1*PYR*CoA - PFL_k2*AcCoA*FOR);
    PFL_k1 = 0.1; PFL_k2 = 0.1;
  Thio: 2 AcCoA -> CoA + AcAcCoA; compartment*(Thio_k1*AcCoA^2 - Thio_k2*CoA*AcAcCoA);
    Thio_k1 = 0.1; Thio_k2 = 0.1;
  AAR: NADH + AcAcCoA -> NAD + HBCoA; compartment*(AAR_k1*NADH*AcAcCoA - AAR_k2*NAD*HBCoA);
    AAR_k1 = 0.1; AAR_k2 = 0.1;
  AlcDH: ACDH + NADH -> ETOH + NAD; compartment*(AlcDH_k1*ACDH*NADH - AlcDH_k2*ETOH*NAD);
    AlcDH_k1 = 0.1; AlcDH_k2 = 0.1;

  // Unit definitions:
  unit length = metre;
  unit area = metre^2;
  unit volume = litre;
  unit time = second;
  unit substance = mole;
end
