// SBML level 2 version 4

model New_Model()

  // Compartments:
  compartment compartment = 1;

  // Species:
  species G6P in compartment = 1;
  species Gluc in compartment = 1;
  species PEP in compartment = 1;
  species PYR in compartment = 1;
  species F6P in compartment = 1;
  species ADP in compartment = 1;
  species ATP in compartment = 1;
  species FBP in compartment = 1;
  species DHAP in compartment = 1;
  species G3P in compartment = 1;
  species BPG in compartment = 1;
  species NAD in compartment = 1;
  species NADH in compartment = 1;
  species Pi in compartment = 1;
  species P3G in compartment = 1;
  species P2G in compartment = 1;
  species H2O in compartment = 1;
  species AcCoA in compartment = 1;
  species Acd in compartment = 1;
  species CoA in compartment = 1;
  species ETOH in compartment = 1;
  species FOR in compartment = 1;
  species AcAcCoA in compartment = 1;
  species HBCoA in compartment = 1;
  species PHB in compartment = 1;
  species CO2 in compartment = 1;
  species AcP in compartment = 1;
  species E4P in compartment = 1;
  species Ri5P in compartment = 1;
  species Ru5P in compartment = 1;
  species X5P in compartment = 1;
  species S7P in compartment = 1;
  species G1P in compartment = 1;
  species Suc in compartment = 1;
  species Fru in compartment = 1;

  // Reactions:
  PGI: G6P -> F6P; compartment*(PGI_k1*G6P - PGI_k2*F6P);
    PGI_k1 = 0.1; PGI_k2 = 0.1;
  ALD: DHAP + G3P -> FBP; compartment*(ALD_k1*DHAP*G3P - ALD_k2*FBP);
    ALD_k1 = 0.1; ALD_k2 = 0.1;
  TPI: G3P -> DHAP; compartment*(TPI_k1*G3P - TPI_k2*DHAP);
    TPI_k1 = 0.1; TPI_k2 = 0.1;
  GAPDH: Pi + G3P + NAD -> BPG + NADH; compartment*(GAPDH_k1*Pi*G3P*NAD - GAPDH_k2*BPG*NADH);
    GAPDH_k1 = 0.1; GAPDH_k2 = 0.1;
  PGK: ADP + BPG -> ATP + P3G; compartment*(PGK_k1*ADP*BPG - PGK_k2*ATP*P3G);
    PGK_k1 = 0.1; PGK_k2 = 0.1;
  PGM: P3G -> P2G; compartment*(PGM_k1*P3G - PGM_k2*P2G);
    PGM_k1 = 0.1; PGM_k2 = 0.1;
  ENO: P2G -> PEP + H2O; compartment*(ENO_k1*P2G - ENO_k2*PEP*H2O);
    ENO_k1 = 0.1; ENO_k2 = 0.1;
  Thio: 2 AcCoA -> CoA + AcAcCoA; compartment*(Thio_k1*AcCoA^2 - Thio_k2*CoA*AcAcCoA);
    Thio_k1 = 0.1; Thio_k2 = 0.1;
  AAR: NADH + AcAcCoA -> NAD + HBCoA; compartment*(AAR_k1*NADH*AcAcCoA - AAR_k2*NAD*HBCoA);
    AAR_k1 = 0.1; AAR_k2 = 0.1;
  FruKin: Fru + ATP -> F6P + ADP; compartment*(FruKin_k1*Fru*ATP - FruKin_k2*F6P*ADP);
    FruKin_k1 = 0.1; FruKin_k2 = 0.1;
  PDH: PYR + NAD + CoA -> NADH + AcCoA + CO2; compartment*(PDH_k1*PYR*NAD*CoA - PDH_k2*NADH*AcCoA*CO2);
    PDH_k1 = 0.1; PDH_k2 = 0.1;
  PKT: Pi + X5P -> H2O + G3P + AcP; compartment*(PKT_k1*Pi*X5P - PKT_k2*H2O*G3P*AcP);
    PKT_k1 = 0.1; PKT_k2 = 0.1;
  RibIso: Ri5P -> Ru5P; compartment*(RibIso_k1*Ri5P - RibIso_k2*Ru5P);
    RibIso_k1 = 0.1; RibIso_k2 = 0.1;
  RibEpi: Ru5P -> X5P; compartment*(RibEpi_k1*Ru5P - RibEpi_k2*X5P);
    RibEpi_k1 = 0.1; RibEpi_k2 = 0.1;
  TALA: F6P + E4P -> G3P + S7P; compartment*(TALA_k1*F6P*E4P - TALA_k2*G3P*S7P);
    TALA_k1 = 0.1; TALA_k2 = 0.1;
  TKT1: G3P + S7P -> Ri5P + X5P; compartment*(TKT1_k1*G3P*S7P - TKT1_k2*Ri5P*X5P);
    TKT1_k1 = 0.1; TKT1_k2 = 0.1;
  TKT2: F6P + G3P -> E4P + X5P; compartment*(TKT2_k1*F6P*G3P - TKT2_k2*E4P*X5P);
    TKT2_k1 = 0.1; TKT2_k2 = 0.1;
  FBPase: FBP + H2O -> Pi + F6P; compartment*(FBPase_k1*FBP*H2O - FBPase_k2*Pi*F6P);
    FBPase_k1 = 0.1; FBPase_k2 = 0.1;
  PTA: CoA + AcP -> Pi + AcCoA; compartment*(PTA_k1*CoA*AcP - PTA_k2*Pi*AcCoA);
    PTA_k1 = 0.1; PTA_k2 = 0.1;
  PYK: ADP + PEP -> ATP + PYR; compartment*(PYK_k1*ADP*PEP - PYK_k2*ATP*PYR);
    PYK_k1 = 0.1; PYK_k2 = 0.1;
  SucP: Suc + Pi -> G1P + Fru; compartment*(SucP_k1*Suc*Pi - SucP_k2*G1P*Fru);
    SucP_k1 = 0.1; SucP_k2 = 0.1;
  HPM: G1P -> G6P; compartment*(HPM_k1*G1P - HPM_k2*G6P);
    HPM_k1 = 0.1; HPM_k2 = 0.1;

  // Unit definitions:
  unit length = metre;
  unit area = metre^2;
  unit volume = litre;
  unit time = second;
  unit substance = mole;
end
